OpenVSP model (file version 5), 4 components.
Geometry view with OpenVSP parameter names; values to 6 digits, angles in degrees, lengths in the model's unit.
Overall bounding box: X_Min=0 X_Len=3.54397 Y_Min=-1.99988 Y_Len=3.99975 Z_Min=-0.147368 Z_Len=0.877368

Pod "Fuselage"
  location (X Y Z) 0 0 0, rotation 0 0 0
  bounding box size 2.8 0.294737 0.294737
  mass: Density=80 Shell_Flag=0 Mass_Area=1 Mass_Prior=0 PointMass=2.2 CGx=1.9 CGy=0 CGz=0.05 Ixx=0 Iyy=0 Izz=0 Ixy=0 Ixz=0 Iyz=0
  Design: FineRatio=19 Length=2.8

Wing "MainWing"
  location (X Y Z) 1.3 0 0.16, rotation 0 0 0
  symmetric about XZ
  bounding box size 1 3.99975 0.182186
  mass: Density=1 Shell_Flag=0 Mass_Area=1 Mass_Prior=0 PointMass=1.3 CGx=0.28 CGy=0 CGz=0.03 Ixx=0 Iyy=0 Izz=0 Ixy=0 Ixz=0 Iyz=0
  totals: TotalSpan=4 TotalProjectedSpan=3.99452 TotalChord=0.775 TotalArea=3.1 TotalAR=5.14715 MAC=0.796774
  root: chord 0.55, twist 0, NACA 4-series Camber=0 CamberLoc=0.2 ThickChord=0.1
  sections:
    n  Span  Root_Chord  Tip_Chord  Area  Sweep  Sweep_Location  Dihedral  Twist  Twist_Location  tip airfoil
    1  2     0.55        1          1.55  1      0.25            3         0      0.25            as above
  SS_Control "Aileron": EtaStart=0.6 EtaEnd=0.95 Length_C_Start=0.25 Length_C_End=0.25 Length_Start=0.205 Length_End=0.244375 LE_Flag=0 Surf_Type=2

Wing "HTail"
  location (X Y Z) 2.45 0 0.18, rotation 0 0 0
  symmetric about XZ
  bounding box size 1 1.4 0.100058
  mass: Density=1 Shell_Flag=0 Mass_Area=1 Mass_Prior=0 PointMass=0.225 CGx=0.15 CGy=0 CGz=0.01 Ixx=0 Iyy=0 Izz=0 Ixy=0 Ixz=0 Iyz=0
  totals: TotalSpan=1.4 TotalProjectedSpan=1.4 TotalChord=0.65 TotalArea=0.91 TotalAR=2.15385 MAC=0.712821
  root: chord 0.3, twist 0, NACA 4-series Camber=0 CamberLoc=0.2 ThickChord=0.1
  sections:
    n  Span  Root_Chord  Tip_Chord  Area   Sweep  Sweep_Location  Dihedral  Twist  Twist_Location  tip airfoil
    1  0.7   0.3         1          0.455  2      0.25            0         0      0.25            as above
  SS_Control "Elevator": EtaStart=0.1 EtaEnd=0.95 Length_C_Start=0.35 Length_C_End=0.35 Length_Start=0.1295 Length_End=0.33775 LE_Flag=0 Surf_Type=2

Wing "VTail"
  location (X Y Z) 2.45 0 0.18, rotation 90 0 0
  bounding box size 1.09397 0.100058 0.55
  mass: Density=1 Shell_Flag=0 Mass_Area=1 Mass_Prior=0 PointMass=0.25 CGx=0.2 CGy=0.22 CGz=0 Ixx=0 Iyy=0 Izz=0 Ixy=0 Ixz=0 Iyz=0
  totals: TotalSpan=0.55 TotalProjectedSpan=0.55 TotalChord=0.675 TotalArea=0.37125 TotalAR=0.814815 MAC=0.72716
  root: chord 0.35, twist 0, NACA 4-series Camber=0 CamberLoc=0.2 ThickChord=0.1
  sections:
    n  Span  Root_Chord  Tip_Chord  Area     Sweep  Sweep_Location  Dihedral  Twist  Twist_Location  tip airfoil
    1  0.55  0.35        1          0.37125  25     0.25            0         0      0.25            as above
  SS_Control "Rudder": EtaStart=0.1 EtaEnd=0.95 Length_C_Start=0.35 Length_C_End=0.35 Length_Start=0.14525 Length_End=0.338625 LE_Flag=0 Surf_Type=2

VSPAERO settings (reference component "MainWing"): Sref=3.1 bref=4 cref=0.775 Xcg=1.44563 Ycg=-3.36587e-08 Zcg=0.0569609 AlphaStart=0 AlphaEnd=10 AlphaNpts=3 BetaStart=0 BetaEnd=0 BetaNpts=1 MachStart=0 MachEnd=0 MachNpts=1 ReCref=1e+07 Vinf=100 Rho=0.002377
  control group "MainWing_Aileron": DeflectionAngle=0
  control group "HTail_Elevator": DeflectionAngle=0
  control group "VTail_Rudder": DeflectionAngle=0
